A(x1, x2, x3, x4, z1, z2, z3, z4) := [x1, x2, -x3, -x4; z1, -z2, z3, -z4; 1, 1, 1, 1; 0, 0, 0, 1]
B(g1) := [0; 0; g1; g1/4]
C(x1, x2, x3, x4, z1, z2, z3, z4, g1) := 1/A(x1, x2, x3, x4, z1, z2, z3, z4)*B(g1) → [
    g1*(x2*z3 - x3*z2 + x2*z4 + x4*z2 + x3*z4 + x4*z3)/(4*(x1*z2 + x2*z1 + x1*z3 + x3*z1 - x2*z3 + x3*z2)) - g1*(x2*z3 - x3*z2)/(x1*z2 + x2*z1 + x1*z3 + x3*z1 - x2*z3 + x3*z2);
    g1*(x1*z3 + x3*z1)/(x1*z2 + x2*z1 + x1*z3 + x3*z1 - x2*z3 + x3*z2) - g1*(x1*z3 + x3*z1 + x1*z4 - z1*x4 + x3*z4 + x4*z3)/(4*(x1*z2 + x2*z1 + x1*z3 + x3*z1 - x2*z3 + x3*z2));
    g1*(x1*z2 + x2*z1)/(x1*z2 + x2*z1 + x1*z3 + x3*z1 - x2*z3 + x3*z2) - g1*(x1*z2 + x2*z1 - x1*z4 + z1*x4 + x2*z4 + x4*z2)/(4*(x1*z2 + x2*z1 + x1*z3 + x3*z1 - x2*z3 + x3*z2));
    g1/4
]
x1 := 1
z1 := 2
g1 := 100
x2 := 1
z2 := 3
x3 := 2
z3 := 5
x4 := 5
z4 := 6
C(x1, x2, x3, x4, z1, z2, z3, z4, g1) = [101.667; -10; -16.6667; 25]
