A(xy) := [cos(xy), sin(xy), 0; -sin(xy), cos(xy), 0; 0, 0, 1]
B(yz) := [1, 0, 0; 0, cos(yz), sin(yz); 0, -sin(yz), cos(yz)]
C(zx) := [-sin(zx), 0, cos(zx); 0, 1, 0; cos(zx), 0, sin(zx)]
D(xy, yz, zx) := A(xy)*B(yz)*C(zx) → [
    cos(zx)*sin(xy)*sin(yz) - cos(xy)*sin(zx), cos(yz)*sin(xy), cos(xy)*cos(zx) + sin(xy)*sin(zx)*sin(yz);
    sin(xy)*sin(zx) + cos(xy)*cos(zx)*sin(yz), cos(xy)*cos(yz), cos(xy)*sin(zx)*sin(yz) - cos(zx)*sin(xy);
    cos(zx)*cos(yz), -sin(yz), cos(yz)*sin(zx)
]
E(xy, yz, zx) := C(xy)*B(yz)*A(zx) → [
    cos(xy)*sin(zx)*sin(yz) - cos(zx)*sin(xy), -(sin(xy)*sin(zx)) - cos(xy)*cos(zx)*sin(yz), cos(xy)*cos(yz);
    -(cos(yz)*sin(zx)), cos(zx)*cos(yz), sin(yz);
    cos(xy)*cos(zx) + sin(xy)*sin(zx)*sin(yz), cos(xy)*sin(zx) - cos(zx)*sin(xy)*sin(yz), cos(yz)*sin(xy)
]
F(xy, yz, zx) := B(xy)*A(yz)*C(zx) → [
    -(cos(yz)*sin(zx)), sin(yz), cos(zx)*cos(yz);
    cos(zx)*sin(xy) + cos(xy)*sin(zx)*sin(yz), cos(xy)*cos(yz), sin(xy)*sin(zx) - cos(xy)*cos(zx)*sin(yz);
    cos(xy)*cos(zx) - sin(xy)*sin(zx)*sin(yz), -(cos(yz)*sin(xy)), cos(xy)*sin(zx) + cos(zx)*sin(xy)*sin(yz)
]
D(1, 2, 3) = [-0.833738, -0.350175, -0.426918; -0.36763, -0.224845, 0.902382; 0.411982, -0.909297, -0.0587266]
G(x) := x^x
x := -0.25, -0.2 .. 1
# [plot: G(x) vs x]
