hforce2 := integral(hq*width*cos(asin(Χ/rad))*cos(asin(Χ/rad)), Χ = -rad .. rad) → 4*hq*rad*width/3
hforce2 := integral(hq*width*cos(asin(Χ/rad))*cos(asin(Χ/rad)), Χ = h1 .. h2) → hq*width*(h1 - h2)*(h1^2 + h1*h2 + h2^2 - 3*rad^2)/(3*rad^2)
vforce1 := integral(vq*width*cos(asin(Χ/rad))*cos(asin(Χ/rad)), Χ = 0 .. rad) → 2*vq*rad*width/3
vforce2 := integral(hq*width*cos(asin(Χ/rad))*sin(asin(Χ/rad)), Χ = 0 .. rad) → hq*rad*width/3
vforce2 := integral(hq*width*cos(asin(Χ/rad))*sin(asin(Χ/rad)), Χ = -rad .. rad) → 0
